# OpenSim document version 30000
Model gait10dof18musc.osim:
  length_units: meters
  force_units: N
  gravity: 0 -9.80665 0
  credits:
    A modified version of the original Gait10dof18musc model. License: Creative Commons (CCBY 3.0). You are free to distribute, remix, tweak, and build upon this work, even commercially, as long as you credit us for the original creation. http://creativecommons.org/licenses/by/3.0/ More Information: http://simtk-confluence.stanford.edu:8080/display/OpenSim/Gait+2392+and+2354+Models
  BodySet:
    Body ground: mass=0 mass_center=(0 0 0) inertia_xx=0 inertia_yy=0 inertia_zz=0
    Body pelvis: mass=11.777 mass_center=(-0.0707 0 0) inertia_xx=0.1028 inertia_yy=0.0871 inertia_zz=0.0579
        meshes=(sacrum.vtp pelvis.vtp l_pelvis.vtp)
      CustomJoint ground_pelvis: parent_body=ground location_in_parent=(0 0 0) location=(0 0 0)
        Coordinate pelvis_tilt: motion_type=rotational default_value=0 range=(-1.570796 1.570796) clamped=false
            locked=true
        Coordinate pelvis_tx: motion_type=translational default_value=0 range=(-5 5) clamped=false locked=true
        Coordinate pelvis_ty: motion_type=translational default_value=1.2 range=(-1 2) clamped=false locked=true
        SpatialTransform: axes_held_at_zero=(rotation2 rotation3)
          TransformAxis rotation1: coordinates=pelvis_tilt axis=(0 0 1) LinearFunction(coefficients=1 0)
          TransformAxis translation1: coordinates=pelvis_tx axis=(1 0 0) LinearFunction(coefficients=1 0)
          TransformAxis translation2: coordinates=pelvis_ty axis=(0 1 0) LinearFunction(coefficients=1 0)
          TransformAxis translation3: axis=(0 0 1) Constant(value=0.02)
    Body femur_r: mass=9.3014 mass_center=(0 -0.17 0) inertia_xx=0.1339 inertia_yy=0.0351 inertia_zz=0.1412
        meshes=femur_r.vtp
      PinJoint hip_r: parent_body=pelvis location_in_parent=(-0.0707 -0.0661 0.0835) location=(0 0 0)
        Coordinate hip_flexion_r: motion_type=rotational default_value=0 range=(-2.094395 2.094395) clamped=false
    Body tibia_r: mass=3.7075 mass_center=(0 -0.1867 0) inertia_xx=0.0504 inertia_yy=0.0051 inertia_zz=0.0511
        meshes=(tibia_r.vtp fibula.vtp)
      CustomJoint knee_r: parent_body=femur_r location_in_parent=(0 0 0) location=(0 0 0)
        Coordinate knee_angle_r: motion_type=rotational default_value=0 range=(-2.094395 0.1745329) clamped=false
        SpatialTransform: axes_held_at_zero=(rotation2 rotation3 translation3)
          TransformAxis rotation1: coordinates=knee_angle_r axis=(0 0 1) LinearFunction(coefficients=1 0)
          TransformAxis translation1: coordinates=knee_angle_r axis=(1 0 0)
            SimmSpline: x=(-2.0944 -1.74533 -1.39626 -1.0472 -0.698132 -0.349066 -0.174533 0.197344 0.337395 0.490178 1.52146 2.0944)
                y=(-0.0032 0.00179 0.00411 0.0041 0.00212 -0.001 -0.0031 -0.005227 -0.005435 -0.005574 -0.005435 -0.00525)
          TransformAxis translation2: coordinates=knee_angle_r axis=(0 1 0)
            SimmSpline: x=(-2.0944 -1.22173 -0.523599 -0.349066 -0.174533 0.159149 2.0944)
                y=(-0.4226 -0.4082 -0.399 -0.3976 -0.3966 -0.395264 -0.396)
    Body talus_r: mass=0.1 mass_center=(0 0 0) inertia_xx=0.001 inertia_yy=0.001 inertia_zz=0.001 meshes=talus.vtp
      PinJoint ankle_r: parent_body=tibia_r location_in_parent=(0 -0.43 0) location=(0 0 0)
        Coordinate ankle_angle_r: motion_type=rotational default_value=0 range=(-1.570796 1.570796) clamped=false
    Body calcn_r: mass=1.25 mass_center=(0.1 0.03 0) inertia_xx=0.0014 inertia_yy=0.0039 inertia_zz=0.0041
        meshes=foot.vtp
      WeldJoint subtalar_r: parent_body=talus_r location_in_parent=(-0.04877 -0.04195 0.00792) location=(0 0 0)
    Body toes_r: mass=0.2166 mass_center=(0.0346 0.006 -0.0175) inertia_xx=0.0001 inertia_yy=0.0002 inertia_zz=0.0001
        meshes=bofoot.vtp
      WeldJoint mtp_r: parent_body=calcn_r location_in_parent=(0.1788 -0.002 0.00108) location=(0 0 0)
    Body femur_l: mass=9.3014 mass_center=(0 -0.17 0) inertia_xx=0.1339 inertia_yy=0.0351 inertia_zz=0.1412
        meshes=femur_l.vtp
      PinJoint hip_l: parent_body=pelvis location_in_parent=(-0.0707 -0.0661 -0.0835) location=(0 0 0)
        Coordinate hip_flexion_l: motion_type=rotational default_value=0 range=(-2.094395 2.094395) clamped=false
    Body tibia_l: mass=3.7075 mass_center=(0 -0.1867 0) inertia_xx=0.0504 inertia_yy=0.0051 inertia_zz=0.0511
        meshes=(tibia_l.vtp l_fibula.vtp)
      CustomJoint knee_l: parent_body=femur_l location_in_parent=(0 0 0) location=(0 0 0)
        Coordinate knee_angle_l: motion_type=rotational default_value=0 range=(-2.094395 0.1745329) clamped=false
        SpatialTransform: axes_held_at_zero=(rotation2 rotation3 translation3)
          TransformAxis rotation1: coordinates=knee_angle_l axis=(0 0 1) LinearFunction(coefficients=1 0)
          TransformAxis translation1: coordinates=knee_angle_l axis=(1 0 0)
            SimmSpline: x=(-2.0944 -1.74533 -1.39626 -1.0472 -0.698132 -0.349066 -0.174533 0.197344 0.337395 0.490178 1.52146 2.0944)
                y=(-0.0032 0.00179 0.00411 0.0041 0.00212 -0.001 -0.0031 -0.005227 -0.005435 -0.005574 -0.005435 -0.00525)
          TransformAxis translation2: coordinates=knee_angle_l axis=(0 1 0)
            SimmSpline: x=(-2.0944 -1.22173 -0.523599 -0.349066 -0.174533 0.159149 2.0944)
                y=(-0.4226 -0.4082 -0.399 -0.3976 -0.3966 -0.395264 -0.396)
    Body talus_l: mass=0.1 mass_center=(0 0 0) inertia_xx=0.001 inertia_yy=0.001 inertia_zz=0.001 meshes=l_talus.vtp
      PinJoint ankle_l: parent_body=tibia_l location_in_parent=(0 -0.43 0) location=(0 0 0)
        Coordinate ankle_angle_l: motion_type=rotational default_value=0 range=(-1.570796 1.570796) clamped=false
    Body calcn_l: mass=1.25 mass_center=(0.1 0.03 0) inertia_xx=0.0014 inertia_yy=0.0039 inertia_zz=0.0041
        meshes=l_foot.vtp
      WeldJoint subtalar_l: parent_body=talus_l location_in_parent=(-0.04877 -0.04195 -0.00792) location=(0 0 0)
    Body toes_l: mass=0.2166 mass_center=(0.0346 0.006 0.0175) inertia_xx=0.0001 inertia_yy=0.0002 inertia_zz=0.0001
        meshes=l_bofoot.vtp
      WeldJoint mtp_l: parent_body=calcn_l location_in_parent=(0.1788 -0.002 -0.00108) location=(0 0 0)
    Body torso: mass=34.2366 mass_center=(-0.03 0.32 0) inertia_xx=1.4745 inertia_yy=0.7555 inertia_zz=1.4314
        meshes=(hat_spine.vtp hat_jaw.vtp hat_skull.vtp hat_ribs.vtp)
      PinJoint back: parent_body=pelvis location_in_parent=(-0.1007 0.0815 0) location=(0 0 0)
        Coordinate lumbar_extension: motion_type=rotational default_value=0 range=(-1.570796 1.570796) clamped=false
            locked=true
  ForceSet:
    Millard2012EquilibriumMuscle [values shared by the 18 below unless stated]: min_control=0 max_control=1
        optimal_force=1 max_contraction_velocity=10 activation_time_constant=0.01 deactivation_time_constant=0.04
        FmaxTendonStrain=0.033 FmaxMuscleStrain=0.6 KshapeActive=0.5 KshapePassive=4 Af=0.3 Flen=1.8
    Millard2012EquilibriumMuscle hamstrings_r: max_isometric_force=2700 optimal_fiber_length=0.1236311
        tendon_slack_length=0.3697589 pennation_angle_at_optimal=0 [radians]
      PathPoint bifemlh_r-P1: pelvis (-0.129056 -0.105091 0.0711468)
      PathPoint bifemlh_r-P2: tibia_r (-0.0297545 -0.0355868 0.0290922)
      PathPoint bifemlh_r-P3: tibia_r (-0.0231314 -0.0556538 0.0339063)
    Millard2012EquilibriumMuscle bifemsh_r: max_isometric_force=804 optimal_fiber_length=0.1914449
        tendon_slack_length=0.09848899 pennation_angle_at_optimal=0.4014257
      PathPoint P1: femur_r (0.0057362 -0.242182 0.0268454)
      PathPoint P2: tibia_r (-0.0297545 -0.0355868 0.0290922)
      PathPoint P3: tibia_r (-0.0231314 -0.0556538 0.0339063)
    Millard2012EquilibriumMuscle glut_max_r: max_isometric_force=1944 optimal_fiber_length=0.1708506
        tendon_slack_length=0.07981739 pennation_angle_at_optimal=0
      PathPoint P1: pelvis (-0.134937 0.00891385 0.0473356)
      PathPoint P2: pelvis (-0.137704 -0.0623969 0.0832984)
      PathPoint P3: femur_r (-0.0516258 -0.0669988 0.0289104)
      PathPoint P4: femur_r (-0.0178969 -0.11656 0.0480694)
    Millard2012EquilibriumMuscle iliopsoas_r: max_isometric_force=2342 optimal_fiber_length=0.1051725
        tendon_slack_length=0.168276 pennation_angle_at_optimal=0.1396263
      PathPoint psoas_r-P1: pelvis (-0.0662903 0.0908802 0.0296104)
      PathPoint psoas_r-P2: pelvis (-0.024385 -0.0584011 0.0777656)
      ConditionalPathPoint psoas_r-P3: pelvis (-0.0295079 -0.0824787 0.0836057) range=(-1.5708 0.785398)
          coordinate=hip_flexion_r
      PathPoint psoas_r-P4: femur_r (0.00183558 -0.0581651 0.00435951)
      PathPoint psoas_r-P5: femur_r (-0.0215681 -0.0684902 0.0119313)
    Millard2012EquilibriumMuscle rect_fem_r: max_isometric_force=1169 optimal_fiber_length=0.1304624
        tendon_slack_length=0.3547661 pennation_angle_at_optimal=0.08726646
      PathPoint P1: pelvis (-0.0302251 -0.0318644 0.0991793)
      ConditionalPathPoint P2: femur_r (0.0383178 -0.462338 0.00217976) range=(-2.61799 -1.45997)
          coordinate=knee_angle_r
      MovingPathPoint P3: tibia_r (0.0610488 0.0207432 0.00138393) x_coordinate=knee_angle_r y_coordinate=knee_angle_r
          z_coordinate=knee_angle_r
        x_location: MultiplierFunction: scale=0.988523
          SimmSpline: x=(-2.0944 -1.99997 -1.5708 -1.45752 -1.39626 -1.0472 -0.698132 -0.526391 -0.349066 -0.174533 0 0.00017453 0.00034907 0.0279253 0.0872665 0.174533 2.0944)
              y=(0.0155805 0.0179938 0.0275081 0.0296564 0.0307615 0.0365695 0.0422074 0.0450902 0.048391 0.0534299 0.0617576 0.0617669 0.0617762 0.0633083 0.066994 0.0733035 0.0573481)
        y_location: MultiplierFunction: scale=0.988523
          SimmSpline: x=(-2.0944 -1.99997 -1.5708 -1.45752 -1.39626 -1.0472 -0.698132 -0.526391 -0.349066 -0.174533 0 0.00017453 0.00034907 0.0279253 0.0872665 0.174533 2.0944)
              y=(0.0234116 0.0237613 0.0251141 0.0252795 0.0253146 0.0249184 0.0242373 0.0238447 0.0234197 0.0227644 0.020984 0.0209814 0.0209788 0.0205225 0.0191754 0.0159554 -0.0673774)
        z_location: MultiplierFunction: scale=0.988523
          SimmSpline: x=(-2.0944 0.1745) y=(0.0014 0.0014)
    Millard2012EquilibriumMuscle vasti_r: max_isometric_force=5000 optimal_fiber_length=0.1246787
        tendon_slack_length=0.1351657 pennation_angle_at_optimal=0.05235988
      PathPoint vas_int_r-P1: femur_r (0.03327 -0.220729 0.0355644)
      PathPoint vas_int_r-P2: femur_r (0.0384325 -0.239085 0.0326963)
      ConditionalPathPoint vas_int_r-P3: femur_r (0.0393503 -0.462338 0.00630982) range=(-2.61799 -1.42)
          coordinate=knee_angle_r
      MovingPathPoint vas_int_r-P4: tibia_r (0.0548266 0.025002 0.00177934) x_coordinate=knee_angle_r
          y_coordinate=knee_angle_r z_coordinate=knee_angle_r
        x_location: MultiplierFunction: scale=0.988523
          SimmSpline: x=(-2.0944 -1.99997 -1.5708 -1.45752 -1.39626 -1.0472 -0.698132 -0.526391 -0.349066 -0.174533 0 0.00017453 0.00034907 0.0279253 0.0872665 0.174533 2.0944)
              y=(0.0082733 0.0106866 0.0202042 0.022353 0.0234583 0.0292715 0.0349465 0.037871 0.0412569 0.0465287 0.0554632 0.0554735 0.0554837 0.0571717 0.061272 0.0684368 0.0648818)
        y_location: MultiplierFunction: scale=0.988523
          SimmSpline: x=(-2.0944 -1.99997 -1.5708 -1.45752 -1.39626 -1.0472 -0.698132 -0.526391 -0.349066 -0.174533 0 0.00017453 0.00034907 0.0279253 0.0872665 0.174533 2.0944)
              y=(0.025599 0.0259487 0.0273124 0.0274796 0.0275151 0.0271363 0.0265737 0.0263073 0.0261187 0.0260129 0.0252923 0.0252911 0.0252898 0.0250526 0.0242191 0.0218288 -0.0685706)
        z_location: MultiplierFunction: scale=0.988523
          SimmSpline: x=(-2.0944 2.0944) y=(0.0018 0.0018)
    Millard2012EquilibriumMuscle gastroc_r: max_isometric_force=2500 optimal_fiber_length=0.09012875
        tendon_slack_length=0.360515 pennation_angle_at_optimal=0.296706
      PathPoint med_gas_r-P1: femur_r (-0.0217976 -0.450751 -0.0269601)
      ConditionalPathPoint med_gas_r-P2: femur_r (-0.0344172 -0.46142 -0.0295988) range=(-0.785398 0.174533)
          coordinate=knee_angle_r
      PathPoint med_gas_r-P3: calcn_r (0 0.0318395 -0.00544352)
    Millard2012EquilibriumMuscle soleus_r: max_isometric_force=5137 optimal_fiber_length=0.05028884
        tendon_slack_length=0.2514442 pennation_angle_at_optimal=0.4363323
      PathPoint P1: tibia_r (-0.00237246 -0.151541 0.00701851)
      PathPoint P2: calcn_r (0 0.0318395 -0.00544352)
    Millard2012EquilibriumMuscle tib_ant_r: max_isometric_force=3000 optimal_fiber_length=0.09791257
        tendon_slack_length=0.2228011 pennation_angle_at_optimal=0.08726646
      PathPoint P1: tibia_r (0.0176946 -0.160536 0.011368)
      PathPoint P2: tibia_r (0.0325224 -0.390565 -0.0174969)
      PathPoint P3: calcn_r (0.119758 0.018282 -0.0313259)
    Millard2012EquilibriumMuscle hamstrings_l: max_isometric_force=2700 optimal_fiber_length=0.1236311
        tendon_slack_length=0.3697589 pennation_angle_at_optimal=0
      PathPoint bifemlh_l-P1: pelvis (-0.129056 -0.105091 -0.0711468)
      PathPoint bifemlh_l-P2: tibia_l (-0.0297545 -0.0355868 -0.0290922)
      PathPoint bifemlh_l-P3: tibia_l (-0.0231314 -0.0556538 -0.0339063)
    Millard2012EquilibriumMuscle bifemsh_l: max_isometric_force=804 optimal_fiber_length=0.1914449
        tendon_slack_length=0.09848899 pennation_angle_at_optimal=0.4014257
      PathPoint P1: femur_l (0.0057362 -0.242182 -0.0268454)
      PathPoint P2: tibia_l (-0.0297545 -0.0355868 -0.0290922)
      PathPoint P3: tibia_l (-0.0231314 -0.0556538 -0.0339063)
    Millard2012EquilibriumMuscle glut_max_l: max_isometric_force=1944 optimal_fiber_length=0.1708506
        tendon_slack_length=0.07981739 pennation_angle_at_optimal=0
      PathPoint P1: pelvis (-0.134937 0.00891385 -0.0473356)
      PathPoint P2: pelvis (-0.137704 -0.0623969 -0.0832984)
      PathPoint P3: femur_l (-0.0516258 -0.0669988 -0.0289104)
      PathPoint P4: femur_l (-0.0178969 -0.11656 -0.0480694)
    Millard2012EquilibriumMuscle iliopsoas_l: max_isometric_force=2342 optimal_fiber_length=0.1051725
        tendon_slack_length=0.168276 pennation_angle_at_optimal=0.1396263
      PathPoint psoas_l-P1: pelvis (-0.0662903 0.0908802 -0.0296104)
      PathPoint psoas_l-P2: pelvis (-0.024385 -0.0584011 -0.0777656)
      ConditionalPathPoint psoas_l-P3: pelvis (-0.0295079 -0.0824787 -0.0836057) range=(-1.5708 0.785398)
          coordinate=hip_flexion_l
      PathPoint psoas_l-P4: femur_l (0.00183558 -0.0581651 -0.00435951)
      PathPoint psoas_l-P5: femur_l (-0.0215681 -0.0684902 -0.0119313)
    Millard2012EquilibriumMuscle rect_fem_l: max_isometric_force=1169 optimal_fiber_length=0.1304624
        tendon_slack_length=0.3547661 pennation_angle_at_optimal=0.08726646
      PathPoint P1: pelvis (-0.0302251 -0.0318644 -0.0991793)
      ConditionalPathPoint P2: femur_l (0.0383178 -0.462338 -0.00217976) range=(-2.61799 -1.45997)
          coordinate=knee_angle_l
      MovingPathPoint P3: tibia_l (0.0610488 0.0207432 -0.00138393) x_coordinate=knee_angle_l y_coordinate=knee_angle_l
          z_coordinate=knee_angle_l
        x_location: MultiplierFunction: scale=0.988523
          SimmSpline: x=(-2.0944 -1.99997 -1.5708 -1.45752 -1.39626 -1.0472 -0.698132 -0.526391 -0.349066 -0.174533 0 0.00017453 0.00034907 0.0279253 0.0872665 0.174533 2.0944)
              y=(0.0155805 0.0179938 0.0275081 0.0296564 0.0307615 0.0365695 0.0422074 0.0450902 0.048391 0.0534299 0.0617576 0.0617669 0.0617762 0.0633083 0.066994 0.0733035 0.0573481)
        y_location: MultiplierFunction: scale=0.988523
          SimmSpline: x=(-2.0944 -1.99997 -1.5708 -1.45752 -1.39626 -1.0472 -0.698132 -0.526391 -0.349066 -0.174533 0 0.00017453 0.00034907 0.0279253 0.0872665 0.174533 2.0944)
              y=(0.0234116 0.0237613 0.0251141 0.0252795 0.0253146 0.0249184 0.0242373 0.0238447 0.0234197 0.0227644 0.020984 0.0209814 0.0209788 0.0205225 0.0191754 0.0159554 -0.0673774)
        z_location: MultiplierFunction: scale=0.988523
          SimmSpline: x=(-2.0944 0.1745) y=(-0.0014 -0.0014)
    Millard2012EquilibriumMuscle vasti_l: max_isometric_force=5000 optimal_fiber_length=0.1246787
        tendon_slack_length=0.1351657 pennation_angle_at_optimal=0.05235988
      PathPoint vas_int_l-P1: femur_l (0.03327 -0.220729 -0.0355644)
      PathPoint vas_int_l-P2: femur_l (0.0384325 -0.239085 -0.0326963)
      ConditionalPathPoint vas_int_l-P3: femur_l (0.0393503 -0.462338 -0.00630982) range=(-2.61799 -1.42)
          coordinate=knee_angle_l
      MovingPathPoint vas_int_l-P4: tibia_l (0.0548266 0.025002 -0.00177934) x_coordinate=knee_angle_l
          y_coordinate=knee_angle_l z_coordinate=knee_angle_l
        x_location: MultiplierFunction: scale=0.988523
          SimmSpline: x=(-2.0944 -1.99997 -1.5708 -1.45752 -1.39626 -1.0472 -0.698132 -0.526391 -0.349066 -0.174533 0 0.00017453 0.00034907 0.0279253 0.0872665 0.174533 2.0944)
              y=(0.0082733 0.0106866 0.0202042 0.022353 0.0234583 0.0292715 0.0349465 0.037871 0.0412569 0.0465287 0.0554632 0.0554735 0.0554837 0.0571717 0.061272 0.0684368 0.0648818)
        y_location: MultiplierFunction: scale=0.988523
          SimmSpline: x=(-2.0944 -1.99997 -1.5708 -1.45752 -1.39626 -1.0472 -0.698132 -0.526391 -0.349066 -0.174533 0 0.00017453 0.00034907 0.0279253 0.0872665 0.174533 2.0944)
              y=(0.025599 0.0259487 0.0273124 0.0274796 0.0275151 0.0271363 0.0265737 0.0263073 0.0261187 0.0260129 0.0252923 0.0252911 0.0252898 0.0250526 0.0242191 0.0218288 -0.0685706)
        z_location: MultiplierFunction: scale=0.988523
          SimmSpline: x=(-2.0944 2.0944) y=(-0.0018 -0.0018)
    Millard2012EquilibriumMuscle gastroc_l: max_isometric_force=2500 optimal_fiber_length=0.09012875
        tendon_slack_length=0.360515 pennation_angle_at_optimal=0.296706
      PathPoint med_gas_l-P1: femur_l (-0.0217976 -0.450751 0.0269601)
      ConditionalPathPoint med_gas_l-P2: femur_l (-0.0344172 -0.46142 0.0295988) range=(-0.785398 0.174533)
          coordinate=knee_angle_l
      PathPoint med_gas_l-P3: calcn_l (0 0.0318395 0.00544352)
    Millard2012EquilibriumMuscle soleus_l: max_isometric_force=5137 optimal_fiber_length=0.05028884
        tendon_slack_length=0.2514442 pennation_angle_at_optimal=0.4363323
      PathPoint P1: tibia_l (-0.00237246 -0.151541 -0.00701851)
      PathPoint P2: calcn_l (0 0.0318395 0.00544352)
    Millard2012EquilibriumMuscle tib_ant_l: max_isometric_force=3000 optimal_fiber_length=0.09791257
        tendon_slack_length=0.2228011 pennation_angle_at_optimal=0.08726646
      PathPoint P1: tibia_l (0.0176946 -0.160536 -0.011368)
      PathPoint P2: tibia_l (0.0325224 -0.390565 0.0174969)
      PathPoint P3: calcn_l (0.119758 0.018282 0.0313259)
