# OpenSim document version 40000
ScaleTool OpenSense_Subject-scaled:
  mass: 79.3787 [kg]
  height: -1
  age: -1
  ModelScaler:
    apply: true
    scaling_order: manualScale
    time_range: -1 -1
    preserve_mass_distribution: false
    ScaleSet:
      Scale: scales=(1.2 1.2 1.2) segment=femur_r apply=true
  MarkerPlacer:
    apply: true
    time_range: -1 -1
    max_marker_movement: -1
