# OpenSim document version 40000
ForwardTool tool:
  model_file: /home/sherwin/Desktop/O2MConverter/models/opensim/Gait10dof18musc/gait10dof18musc_for_testing.osim
  replace_force_set: false
  results_directory: .
  output_precision: 20
  initial_time: 0
  final_time: 0.998
  solve_for_equilibrium_for_auxiliary_states: true
  maximum_number_of_integrator_steps: 2000000000
  maximum_integrator_step_size: 0.002
  minimum_integrator_step_size: 0.002
  integrator_error_tolerance: 5e-5
  states_file: /home/sherwin/Desktop/O2MConverter/models/opensim/Gait10dof18musc/initial_states.sto
  use_specified_dt: false
  AnalysisSet Analyses:
    Actuation: start_time=0 end_time=0.998 step_interval=1 in_degrees=false
  ControllerSet Controllers:
    ControlSetController: controls_file=/home/sherwin/Desktop/O2MConverter/tests/gait10dof18musc/forward_dynamics/run_1656897079776/controls.sto
